// SBML level 2 version 3

function influx(v)
  v;
end
influx is "Constant flux (irreversible)";

model HIF_model()
  // HIF pathway

  // Compartments:
  compartment c = 1;

  // Species:
  species HIF_1a in c = 1.0535;
  species ARNT in c = 6.5587;
  species HRE in c = 7.8222;
  species PHD in c = 0.6179;
  species HIF_1a_ARNT in c = 6.9027;
  species HIF_1a_ARNT_HRE in c = 8.5775;
  species HIF_1a_PHD in c = 0.8013;
  species HIF_1a_OH in c = 11.7663;
  species $O2 in c = 196.3402;

  // Parameters:
  IC_HIF_1a = 1.0535;
  IC_ARNT = 6.5587;
  IC_HRE = 7.8222;
  IC_PHD = 0.6179;
  IC_HIF_1a_ARNT = 6.9027;
  IC_HIF_1a_ARNT_HRE = 8.5775;
  IC_HIF_1a_PHD = 0.8013;
  IC_HIF_1a_OH = 11.7663;

  // Reactions:
  HIF_production: => HIF_1a; c*influx(v); HIF_production is "HIF_1a production";
    v = 2.4878;
  ARNT_complexation: HIF_1a + ARNT -> HIF_1a_ARNT; c*(ARNT_complexation_fwd*HIF_1a*ARNT - ARNT_complexation_bwd*HIF_1a_ARNT);
    ARNT_complexation_fwd = 0.0773; ARNT_complexation_bwd = 10.6237;
  HRE_complexation: HRE + HIF_1a_ARNT -> HIF_1a_ARNT_HRE; c*(HRE_complexation_fwd*HRE*HIF_1a_ARNT - HRE_complexation_bwd*HIF_1a_ARNT_HRE);
    HRE_complexation_fwd = 1.3097; HRE_complexation_bwd = 2.201;
  PHD_complexation: HIF_1a + PHD -> HIF_1a_PHD; c*(PHD_complexation_fwd*HIF_1a*PHD - PHD_complexation_bwd*HIF_1a_PHD);
    PHD_complexation_fwd = 43.117; PHD_complexation_bwd = 5.3871;
  HIF_hydroxylation: HIF_1a_PHD + $O2 => HIF_1a_OH + PHD; c*HIF_hydroxylation_fwd*HIF_1a_PHD*O2;
    HIF_hydroxylation_fwd = 0.3977;
  HIF_degradation: HIF_1a_OH => ; c*HIF_degradation_fwd*HIF_1a_OH;
    HIF_degradation_fwd = 8.1326;

  // Unit definitions:
  unit volume = dimensionless;
  unit time = 60 second;
end
